# EQUIPMENT 1: ANESTHESIA MACHINE (Perseus A500)/ DUAL WARMING CABINET (STERIS)
# 1) SEISMIC PARAMETERS AND GEOMETRY:
S_DS := 1.121
W_P := 335*lbf
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a_P := 1  # (ASCE 7-10 Tab 13.5-1 - Laboratory Equipment)
R_P := 2.5
I_P := 1.5  # (Per general notes S0-1)
Ω_0 := 2.5
z := 0
h := 75
z/h = 0
A := 30*in
B := 20.5*in
a := 1.5*in
b := -1.5*in
H := 74.25*in
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CG_Y := 2/3*H = 49.5 in
CG_X1 := A/2 = 15 in
CG_X2 := B/2 = 10.25 in
# 2) DETERMINE SEISMIC FORCE:
F_P := 0.4*a_P*S_DS*W_P/(R_P/I_P)*(1 + 2*z/h) = 90.1284 lbf
F_P_max := 1.6*S_DS*I_P*W_P = 901.284 lbf
F_P_min := 0.3*S_DS*I_P*W_P = 168.991 lbf
F_P := min(max(F_P, F_P_min), F_P_max) = 168.991 lbf
# 3) LOAD COMBINATIONS:
F_PVa := (0.6 - 0.14*S_DS)*W_P = 148.425 lbf
F_PHa := 0.7*F_P = 118.294 lbf
F_PVs := (0.9 - 0.2*S_DS)*W_P = 226.393 lbf
F_PHs := Ω_0*F_P = 422.477 lbf
# 4) DETERMINE MAXIMUM TENSION AND SHEAR AT ANCHOR POINTS:
# (1) Direction - X
V_max1 := F_PHa/2 = 59.1468 lbf
V_U1 := F_PHs/4 = 105.619 lbf
# (2) Direction - Y
V_max2 := F_PHa/2 = 59.1468 lbf
V_U2 := F_PHs/4 = 105.619 lbf
T_max2 := F_PHa/2 = 59.1468 lbf
# Computing maximum force as resultant of both the forces for SMS :
V_max := V_max2 + 0.3*V_max1 = 76.8908 lbf
# Provide (2) #10 SMS at vertical leg of each angle
V_allowable := 405*lbf  # ;
T_allowable := 159
DCR := V_max/(2*V_allowable) = 0.0949269  # OK
T_max := T_max2 = 59.1468 lbf
# Thus, provide (2) #10 SMS at EA leg of steel angle
V_allowable := 140 lbf  # ;
T_allowable := 159*lbf
DCR := V_max/(2*V_allowable) + T_max/(2*T_allowable) = 0.460606  # OK
# Computing ultimate force as resultant of both the forces for floor anchors:
V_U := V_U2 + 0.3*V_U1 = 137.305 lbf
# Thus, use, (4) - 1/2" DIA x 3 1/4 EMBED expansion anchors to the floor per HILTI report (see attached)
# 5) CHECK BACKING:
l_backing := 16 in  # (14GA backing)
P := F_PHa/2 = 59.1468 lbf
# Moment, M_max generated due to force F_P is given by
M_max := P*l_backing/4 = 236.587 lbf*in
f_y := 33000 lbf/in^2
t_backing := 0.078*in
b := 6 in
I_Y := 1/12*b*t_backing^3
y_b := t_backing/2 = 0.039 in
S_Y := I_Y/y_b = 0.006084 in^3
M_allowable := f_y*S_Y/1.67 = 120.223 lbf*in
DCR := M_max/M_allowable = 1.96791  # NOT_OK
# 5) CHECK STUD CAPACITY:
H_wall := 16 ft
F_PHs = 422.477 lbf
p_LL := 5*lbf/ft^2
P := F_PHa/2 = 59.1468 lbf
w_LL := p_LL*16 in = 6.66667 lbf/ft
M_max_s := (F_PHa*(H_wall - CG_Y))/H_wall*CG_Y = 4.3459 kip*in  # (governs)
M_max_ll := w_LL*H_wall^2/8 = 2.56 kip*in
M_allowable := 10.39 kip*in  # M_all for 400S1620-54 33 ksi stud per SSMA ESR-3064
DCR := M_max_s/M_allowable = 0.418277  # OK
V_u.top := (F_PHs*(H_wall - CG_Y))/H_wall = 313.557 lbf
V_u.bottom := (F_PHs*CG_Y)/H_wall = 108.92 lbf
# Provide 3/8" DIA x 2" EMBED Expansion Anchor at top and bottom of the wall stud per detail 5 and 24 on sheet A9-1
