# EQUIPMENT 3: SURGICAL SCRUB SINK (2 BAY)
# 1) SEISMIC PARAMETERS AND GEOMETRY:
S_DS := 1.121
W_P := 295*lbf
a_P := 1  # (ASCE 7-10 Tab 13.5-1 - Laboratory Equipment)
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R_P := 2.5
I_P := 1.5  # (Per general notes S0-1)
z := 4
h := 75
z/h = 0.0533333
# PLAN
A := 64*in
B := 28*in
a := 1.5*in
b := -3.5*in
H := 39.5*in
CG_Y := 12*in + 2/3*H = 38.3333 in
CG_X1 := A/2 = 32 in
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CG_X2 := B/2 = 14 in
Ω_0 := 2.5
# ELEVATION
# 2) DETERMINE SEISMIC FORCE:
F_P := 0.4*a_P*S_DS*W_P/(R_P/I_P)*(1 + 2*z/h) = 87.8326 lbf
F_P_max := 1.6*S_DS*I_P*(2/3*W_P) = 529.112 lbf
F_P_min := 0.3*S_DS*I_P*(2/3*W_P) = 99.2085 lbf
F_P := min(max(F_P, F_P_min), F_P_max) = 99.2085 lbf
# 3) LOAD COMBINATIONS:
F_PVa := (0.6 - 0.14*S_DS)*W_P = 130.703 lbf
F_PVs := (0.9 - 0.2*S_DS)*W_P = 199.361 lbf
F_PHa := 0.7*F_P = 69.4459 lbf
F_PHs := F_P = 99.2085 lbf
# 4) DETERMINE MAXIMUM TENSION AND SHEAR AT ANCHOR POINTS:
V_max1 := F_PHs = 99.2085 lbf
T_max1 := F_PHs/2 + (F_PVs*CG_X2)/(17.35*in) = 210.472 lbf
# Computing maximum force as resultant of both the forces:
T_max := T_max2 + 0.3*T_max1
V_max := V_max1 + 0.3*V_max2
# Provide (8)#10 SMS Screws at each stud connection aligned to the equipment
T_n := 159*lbf
V_n := 405*lbf
DCR := T_max/T_n + V_max/V_n  # O.K.
# 5) CHECK WALL STUD CAPACITY
# Determine Flexural Capacity of Metal Stud
# for Sesimic Loads
P_1 := T_max2  # ;
P_2 := T_max1 = 210.472 lbf
h_1 := 12*in + 15*in = 27 in  # ;
h_2 := 27*in + 16*in = 43 in
H_wall := 15*ft
V_bott := P_1*(H_wall - h_1)/H_wall + P_2*(H_wall - h_2)/H_wall  # (governs)
M_max := V_bott*h_1
# for Internal Wind Pressure
p_w := 5*psf
s := 16 in
w_w := p_w*s = 6.66667 plf
V_bott := w_w*H_wall/2 = 50 lbf
M_max := w_w*H_wall^2/8 = 2.25 kip*in  # (governs)
# Thus,
V_max := V_bott = 50 lbf
M_max = 2.25 kip*in  # (due to internal wind pressure)
# For 400S162-54 50 ksi Metal Stud  (stud per 25/A4-1)
M_allowable := 10.39*kip*in
DCR := M_max/M_allowable = 0.216554  # O.K.
# 6) CHECK BOTTOM CONNECTION OF WALL
F_PH := Ω_0*F_P/3 = 82.6737 lbf  # per each connection point at bottom
# 3/8" DIA Expansion Anchor w/ min. 2" Embed  (per 5/A9-1)
