equipment_name := "Anesthesia Machine "
project_number := "1111"
mounting_location := "Wall, Floor"
eqpt_number := "1234"
# 1) SEISMIC PARAMETERS AND GEOMETRY:
S_DS := 1.121
W_P := 333 lb
a_P := 1  # (ASCE 7-10 Tab 13.5-1 - Laboratory Equipment)
R_P := 2.5
I_P := 1.5  # (Per general notes S0-1)
z := 0
h := 75
z/h = 0
A := 30 in
B := 20.5 in
a := 1.5 in
b := -1.5 in
H := 74.25 ft
CG_Y := 2/3*H = 594 in
CG_X1 := A/2 = 15 in
CG_X2 := B/2 = 10.25 in
# 2) DETERMINE SEISMIC FORCE:
F_P := 0.4*a_P*S_DS*W_P/(R_P/I_P)*(1 + 2*z/h) = 9.13567 lbf*s^2/m
F_P_max := 1.6*S_DS*I_P*W_P = 91.3567 lbf*s^2/m
F_P_min := 0.3*S_DS*I_P*W_P = 17.1294 lbf*s^2/m
F_P := min(max(F_P, F_P_min), F_P_max) = 17.1294 lbf*s^2/m
# 3) LOAD COMBINATIONS:
F_PV := (0.6 - 0.14*S_DS)*W_P = 15.0448 lbf*s^2/m
F_PH := 0.7*F_P = 11.9906 lbf*s^2/m
# 4) DETERMINE MAXIMUM TENSION AND SHEAR AT ANCHOR POINTS:
# (1) Direction - X
V_max1 := F_PH/4 = 2.99764 lbf*s^2/m
T_max1 := (F_PH*CG_Y - F_PV*(A + a - CG_X1))/(2*(A + 2*a)) = 104.154 lbf*s^2/m  # No overturning
# (2) Direction - Y
V_max2 := F_PH/4 = 2.99764 lbf*s^2/m
T_max2 := (F_PH*CG_Y - F_PV*(B + b - CG_X2))/(2*(B + 2*b)) = 199.736 lbf*s^2/m
# Computing maximum force as resultant of both the forces:
T_max := T_max2 = 199.736 lbf*s^2/m
V_max := V_max2 + 0.3*V_max1 = 3.89693 lbf*s^2/m
# Provide (2)#10 SMS Screws at the vertical leg of each angle
T_n := 159*lbf
V_n := 405*lbf
DCR := T_max/T_n + V_max/V_n = 1.26582 s^2/m  # O.K.
# Provide (1) 1/2" DIA BOLT per angle to counter top connection
# 5) CHECK CASEWORK 1/2" PLY WOOD FOR BENDING
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p_DL := 3*psf
w_DL := p_DL*2*ft = 6 plf
P_eqpt := W_P*(12*in/(30*in)) = 13.5826 lbf*s^2/m  # Countertop angle support at 1'-0" o.c.
l_span := 24*in  # Casework top spanning between ends at 24"
M_MAX := w_DL*l_span^2/8 + F_PH*(12 in/(30*in))*CG_Y  # error: These units are not compatible.
b := 24*in  # ;
t_ply := 0.5*in
S_Y := b*t_ply^2/6 = 1 in^3
f_b := M_MAX/S_Y  # error: This variable is undefined. Check that the label is set correctly.  # Bending stress in counter top (2) 1/2" plywood
# Determine countertop plywood capacity
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F_bs := 370 lbf*in/ft
b := 2*ft  # width of the cabinet (span into consideration)
f_b_allowable := F_bs*b/S_Y = 740 psi
DCR := f_b/f_b_allowable  # error: This variable is undefined. Check that the label is set correctly.  # OK
