# EQUIPMENT 2: WARMING CABINET
# 1) SEISMIC PARAMETERS AND GEOMETRY:
S_DS := 1.121
W_P := 137*lbf
a_P := 1  # (ASCE 7-10 Tab 13.5-1 - Laboratory Equipment)
R_P := 2.5
I_P := 1.5  # (Per general notes S0-1)
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z := 3
h := 75
z/h = 0.04
A := 30*in
B := 21.5*in
a := 1.5*in
b := -3.5*in
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H := 24.5*in
CG_Y := 2/3*H = 16.3333 in
CG_X1 := A/2 = 15 in
CG_X2 := B/2 = 10.75 in
# 2) DETERMINE SEISMIC FORCE:
F_P := 0.4*a_P*S_DS*W_P/(R_P/I_P)*(1 + 2*z/h) = 39.8072 lbf
F_P_max := 1.6*S_DS*I_P*W_P = 368.585 lbf
F_P_min := 0.3*S_DS*I_P*W_P = 69.1096 lbf
F_P := min(max(F_P, F_P_min), F_P_max) = 69.1096 lbf
# 3) LOAD COMBINATIONS:
F_PV := (0.6 - 0.14*S_DS)*W_P = 60.6992 lbf
F_PH := 0.7*F_P = 48.3768 lbf
# 4) DETERMINE MAXIMUM TENSION AND SHEAR AT ANCHOR POINTS:
# (1) Direction - X
V_max1 := F_PH/4 = 12.0942 lbf
T_max1 := (F_PH*CG_Y - F_PV*(A + a - CG_X1))/(2*(A + 2*a)) = -3.20278 lbf  # No overturning
# (2) Direction - Y
V_max2 := F_PH/4 = 12.0942 lbf
T_max2 := (F_PH*CG_Y - F_PV*(B + b - CG_X2))/(2*(B + 2*b)) = 12.0719 lbf
# Computing maximum force as resultant of both the forces:
T_max := T_max2 = 12.0719 lbf
V_max := V_max2 + 0.3*V_max1 = 15.7224 lbf
# Provide (2)#10 SMS Screws at the vertical leg of each angle
T_n := 159*lbf
V_n := 405*lbf
DCR := T_max/T_n + V_max/V_n = 0.114745  # O.K.
# Provide (1) 1/2" DIA BOLT per angle to counter top connection
# 5) CHECK CASEWORK 1/2" PLY WOOD FOR BENDING
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p_DL := 3*psf
w_DL := p_DL*2*ft = 6 plf
P_eqpt := W_P*(12*in/(30*in)) = 54.8 lbf  # Countertop angle support at 1'-0" o.c.
l_span := 24*in  # Casework top spanning between ends at 24"
M_MAX := w_DL*l_span^2/8 + F_PH*(12 in/(30*in))*CG_Y = 0.352061 kip*in
b := 24*in  # ;
t_ply := 0.5*in
S_Y := b*t_ply^2/6 = 1 in^3
f_b := M_MAX/S_Y = 352.061 psi  # Bending stress in counter top (2) 1/2" plywood
# Determine countertop plywood capacity
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F_bs := 370 lbf*in/ft
b := 2*ft  # width of the cabinet (span into consideration)
f_b_allowable := F_bs*b/S_Y = 740 psi
DCR := f_b/f_b_allowable = 0.475759  # OK
